// SBML level 2 version 4

model Demo()

  // Compartments:
  compartment Compartment = 1 liter;

  // Species:
  species A in Compartment = 1000;
  species B in Compartment = 10;
  species C in Compartment = 10;
  species AB in Compartment = 0;
  species AC in Compartment = 0;
  species ABC in Compartment = 0;
  species $Activation in Compartment;
  species $ABCoverSUM in Compartment;
  species $C_mon in Compartment;
  species $B_mon in Compartment;
  species $A_mon in Compartment;
  species $A_NetFlux in Compartment;
  species $B_NetFlux in Compartment;
  species $C_NetFlux in Compartment;
  species $AB_NetFlux in Compartment;
  species $AC_NetFlux in Compartment;
  species $ABC_NetFlux in Compartment;

  // Parameters:
  S = 1e-6 dimensionless;
  inv_tau = 1000 dimensionless;
  kf_R0 = 1 one_over_s;
  kr_R0 = 1 one_over_s;
  kf_R1 = 1 one_over_s;
  kr_R1 = 1 one_over_s;
  kf_R2 = 1 one_over_s;
  kr_R2 = 1 one_over_s;
  kf_R3 = 1 one_over_s;
  kr_R3 = 1 one_over_s;
  kf_R4 = 1 one_over_s;
  kr_R4 = 1 one_over_s;
  u = 1 nanomole_per_liter;
  t_on = 0 s;

  // Assignment rules:
  Activation := 1/(1 - exp(-(time - t_on)*inv_tau));
  ABCoverSUM := ABC/(A + B + C + S);
  C_mon := C;
  B_mon := B;
  A_mon := A;
  A_NetFlux := -ReactionFlux0 - ReactionFlux1;
  B_NetFlux := -ReactionFlux0 - ReactionFlux3;
  C_NetFlux := -ReactionFlux1 - ReactionFlux2;
  AB_NetFlux := ReactionFlux0 - ReactionFlux2;
  AC_NetFlux := ReactionFlux1 - ReactionFlux3;
  ABC_NetFlux := ReactionFlux2 + ReactionFlux3;

  // Reactions:
  ReactionFlux0: A + B -> AB; (u*kf_R0*A*B - kr_R0*AB)*Compartment;
  ReactionFlux1: A + C -> AC; (kf_R1*A*C - kr_R1*AC)*Compartment;
  ReactionFlux2: AB + C -> ABC; (kf_R2*AB*C - kr_R2*ABC)*Compartment;
  ReactionFlux3: AC + B -> ABC; (kf_R3*AC*B - kr_R3*ABC)*Compartment;

  // Unit definitions:
  unit time = 1e-3 second;
  unit substance = 1e-3 mole;
  unit volume = litre;
  unit area = (1e-9 metre)^2;
  unit length = 1e-9 metre;
  unit dimensionless = dimensionless;
  unit micromole_per_liter = 1e-6 mole / litre;
  unit one_over_s = dimensionless / second;
  unit nanomole_per_liter = 1e-9 mole / litre;
  unit s = second;
  unit liter = litre;
end
